*Heading
 OneFifthMesh-periodic
** Job name: OneFifthMesh-Periodic Model name: tension-5-periodic
** Generated by: Abaqus/CAE 2019
*Preprint, echo=NO, model=NO, history=NO, contact=NO
**
** PARTS
**
*Part, name=Part-1
*Node
      1,          -1.,          -1.,           2.
      2,          -1.,           1.,           2.
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*Element, type=C3D10T
   1,   603,   604,   605,   606,  1491,  1490,  1489,  1493,  1492,  1494
   2,   603,   605,   607,   608,  1489,  1496,  1495,  1498,  1497,  1499
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*Nset, nset=Set-1, generate
     1,  10580,      1
*Elset, elset=Set-1, generate
    1,  7005,     1
*Nset, nset=Set-1
     1,     2,     5,     8,     9,    10
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*Elset, elset=Set-1
  362,  660,  723,  767,  843, 1095
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*Nset, nset=Set-2
     3,     4,     6,     7,    27,    28
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*Elset, elset=Set-2
   84,  192,  354,  491,  531,  584
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*Elset, elset=_Surf-1_S3
  362,  660,  723,  767,  843, 1095
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*Elset, elset=_Surf-1_S1
 2597,
*Elset, elset=_Surf-1_S4
 3637, 4534, 4583, 5161, 5282
*Surface, type=ELEMENT, name=Surf-1
_Surf-1_S3, S3
_Surf-1_S1, S1
_Surf-1_S4, S4
**
** Section: Section-1
*Solid Section, elset=Set-1, material=MAT1_GRN1
,
*End Part
**
**
** ASSEMBLY
**
*Assembly, name=Assembly
**
*Instance, name=Part-1-1, part=Part-1
*End Instance
**
*Nset, nset=Set-102, instance=Part-1-1, generate
    1,  10580, 1
*Elset, elset=Set-102, instance=Part-1-1, generate
    1,  7005, 1
*Nset, nset=Hsurface, instance=Part-1-1
    3,     4,     6,     7,    27,    28
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 *Nset, nset=Set-1, instance=Part-1-1
     1,     2,     5,     8,     9,    10
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*Elset, elset=Set-1, instance=Part-1-1
  362,  660,  723,  767,  843, 1095
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*Nset, nset=Set-2, instance=Part-1-1
     3,     4,     6,     7,    27,    28
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*Elset, elset=Set-2, instance=Part-1-1
   84,  192,  354,  491,  531,  584
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*Elset, elset=_Surf-1_S3, instance=Part-1-1
  362,  660,  723,  767,  843, 1095
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*Elset, elset=_Surf-1_S1, instance=Part-1-1
 2597,
*Elset, elset=_Surf-1_S4, instance=Part-1-1
 3637, 4534, 4583, 5161, 5282
*Surface, type=ELEMENT, name=Surf-1
_Surf-1_S3, S3
_Surf-1_S1, S1
_Surf-1_S4, S4
**
**
**
*End Assembly
*Amplitude, name=Amp-1
             0.,              0.,              1.,            0.05
**
** MATERIALS
**
*Material, name=MAT1_GRN1
*Density
1.,
*Depvar
     76,
*User Material, constants=2, type=MECHANICAL
768.,1.
*User Material, constants=8, type=THERMAL
0.01271, 4, 20.2e6, 0., 58.6e6, 8.464e13, 11.5e6, 8.464e17
***********************************************
** ----------------------------------------------------------------
**
** PREDEFINED FIELDS
**
** Name: Predefined Field-1   Type: Temperature
*Initial Conditions, type=TEMPERATURE
Set-102, 2.659e11
** ----------------------------------------------------------------
**
** STEP: Step-1
**
*Step, name=Step-1, nlgeom=YES, inc=10000, unsymm=YES, amplitude=RAMP
*Coupled Temperature-displacement, creep=none, deltmx=1e13
0.00001, 1., 1e-25, 0.001
**Controls, parameters=TIME INCREMENTATION
**2,10,1E-10,0.01
**
** BOUNDARY CONDITIONS
**
** Name: BC-1 Type: Symmetry/Antisymmetry/Encastre
*Boundary, amplitude=Amp-1
Set-2, ENCASTRE
** Name: SurfaceH Type: Temperature
*Boundary, amplitude=Amp-1
Hsurface, 11, 11, 2.659e13
**
** LOADS
**
** Name: Load-1   Type: Pressure
*Dsload
Surf-1, P, -0.1
**
**
** OUTPUT REQUESTS
**
*Restart, write, frequency=0
**
** FIELD OUTPUT: F-Output-1
**
*Output, field, frequency=2
*Node Output
CF, RF, U
**
** FIELD OUTPUT: F-Output-2
**
*Element Output, directions=YES
S, SDV
*Output, history, frequency=0
*End Step
