*Heading
 OneFifthMesh-periodic
** Job name: OneFifthMesh-Periodic Model name: tension-5-periodic
** Generated by: Abaqus/CAE 2019
*Preprint, echo=NO, model=NO, history=NO, contact=NO
**
** PARTS
**
*Part, name=Part-1
*Node
      1,         -0.5,           0.,          0.5
      2,           0.,           0.,          0.5
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*Element, type=C3D4T
   1, 820, 821, 822, 823
   2, 285, 822, 824, 825
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*Nset, nset=Set-1, generate
    1,  1681,     1
*Elset, elset=Set-1, generate
    1,  8142,     1
*Nset, nset=MAT1_GRN1
    2,    3,    5,    8,   13,   14
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*Elset, elset=MAT1_GRN1, generate
 2045,  3069,     1
*Nset, nset=MAT1_GRN2
    2,    8,    9,   12,   14,   15
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*Elset, elset=MAT1_GRN2, generate
 6061,  7109,     1
*Nset, nset=MAT1_GRN3
    1,    2,    7,    8,    9,   10
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*Elset, elset=MAT1_GRN3, generate
 1018,  2044,     1
*Nset, nset=MAT1_GRN4
   1,   2,   3,   4,   5,   6
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*Elset, elset=MAT1_GRN4, generate
    1,  1017,     1
*Nset, nset=MAT1_GRN5
    2,    3,   13,   14,   18,   20
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*Elset, elset=MAT1_GRN5, generate
 5062,  6060,     1
*Nset, nset=MAT1_GRN6
    2,    9,   14,   18,   21,   24
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*Elset, elset=MAT1_GRN6, generate
 7110,  8142,     1
*Nset, nset=MAT1_GRN7
    1,    2,    9,   10,   17,   18
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*Elset, elset=MAT1_GRN7, generate
 4066,  5061,     1
*Nset, nset=MAT1_GRN8
    1,    2,    3,    4,   17,   18
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*Elset, elset=MAT1_GRN8, generate
 3070,  4065,     1
*Nset, nset=FixedX
   1,   4,   6,   7,  10,  11
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*Nset, nset=FixedCorner
 22,
*Nset, nset=DISPX
  13,  14,  15,  16,  23,  24
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*Elset, elset=DISPX
 2314, 2327, 2346, 2382, 2439, 2491
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*Nset, nset=FixedY-Node
 19,
*Nset, nset=FixedZ-Node
 11,
** Section: Mat1_GRN4
*Solid Section, elset=MAT1_GRN4, material=MAT1_GRN4
,
** Section: Mat1_GRN3
*Solid Section, elset=MAT1_GRN3, material=MAT1_GRN3
,
** Section: Mat1_GRN1
*Solid Section, elset=MAT1_GRN1, material=MAT1_GRN1
,
** Section: Mat1_GRN8
*Solid Section, elset=MAT1_GRN8, material=MAT1_GRN8
,
** Section: Mat1_GRN7
*Solid Section, elset=MAT1_GRN7, material=MAT1_GRN7
,
** Section: Mat1_GRN5
*Solid Section, elset=MAT1_GRN5, material=MAT1_GRN5
,
** Section: Mat1_GRN2
*Solid Section, elset=MAT1_GRN2, material=MAT1_GRN2
,
** Section: Mat1_GRN6
*Solid Section, elset=MAT1_GRN6, material=MAT1_GRN6
,
*End Part
**
**
** ASSEMBLY
**
*Assembly, name=Assembly
**
*Instance, name=Part-1-1, part=Part-1
*End Instance
**
*Nset, nset=Set-102, instance=Part-1-1, generate
    1,  1681, 1
*Elset, elset=Set-102, instance=Part-1-1, generate
    1,  8142, 1
*Nset, nset=Hsurface, instance=Part-1-1
   9,  10,  11,  12,  21,  22
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**
**
*End Assembly
*Amplitude, name=Amp-1
             0.,              0.,              1.,            0.05
**
** MATERIALS
**
*Material, name=MAT1_GRN1
*Density
1.,
*Depvar
     76,
*User Material, constants=2, type=MECHANICAL
768.,1.
*User Material, constants=8, type=THERMAL
0.01271, 4, 20.2e6, 0., 58.6e6, 8.464e13, 11.5e6, 8.464e17
***********************************************
*Material, name=MAT1_GRN2
*Density
1.,
*Depvar
     76,
*User Material, constants=2, type=MECHANICAL
768.,1.
*User Material, constants=8, type=THERMAL
0.01271, 4, 20.2e6, 0., 58.6e6, 8.464e13, 11.5e6, 8.464e17
****************************************
*Material, name=MAT1_GRN3

*Density
1.,
*Depvar
     76,
*User Material, constants=2, type=MECHANICAL
768.,1.
*User Material, constants=8, type=THERMAL
0.01271, 4, 20.2e6, 0., 58.6e6, 8.464e13, 11.5e6, 8.464e17
*******************************************
*Material, name=MAT1_GRN4
*Density
1.,
*Depvar
     76,
*User Material, constants=2, type=MECHANICAL
768.,1.
*User Material, constants=8, type=THERMAL
0.01271, 4, 20.2e6, 0., 58.6e6, 8.464e13, 11.5e6, 8.464e17
********************************************
*Material, name=MAT1_GRN5
*Density
1.,
*Depvar
     76,
*User Material, constants=2, type=MECHANICAL
768.,1.
*User Material, constants=8, type=THERMAL
0.01271, 4, 20.2e6, 0., 58.6e6, 8.464e13, 11.5e6, 8.464e17
***********************************************
*Material, name=MAT1_GRN6
*Density
1.,
*Depvar
     76,
*User Material, constants=2, type=MECHANICAL
768.,1.
*User Material, constants=8, type=THERMAL
0.01271, 4, 20.2e6, 0., 58.6e6, 8.464e13, 11.5e6, 8.464e17
**************************************************
*Material, name=MAT1_GRN7
*Density
1.,
*Depvar
     76,
*User Material, constants=2, type=MECHANICAL
768.,1.
*User Material, constants=8, type=THERMAL
0.01271, 4, 20.2e6, 0., 58.6e6, 8.464e13, 11.5e6, 8.464e17
**************************************************
*Material, name=MAT1_GRN8
*Density
1.,
*Depvar
     76,
*User Material, constants=2, type=MECHANICAL
768.,1.
*User Material, constants=8, type=THERMAL
0.01271, 4, 20.2e6, 0., 58.6e6, 8.464e13, 11.5e6, 8.464e17
**
** PREDEFINED FIELDS
**
** Name: Predefined Field-1   Type: Temperature
*Initial Conditions, type=TEMPERATURE
Set-102, 2.659e11
** ----------------------------------------------------------------
**
** BOUNDARY CONDITIONS
**
** Name: BC-1 Type: Displacement/Rotation
*Boundary
Part-1-1.FixedCorner, 1, 1
Part-1-1.FixedCorner, 2, 2
Part-1-1.FixedCorner, 3, 3
** Name: BC-2 Type: Displacement/Rotation
*Boundary
Part-1-1.FixedX, 1, 1
** Name: BC-3 Type: Displacement/Rotation
*Boundary
Part-1-1.FixedY-Node, 2, 2
** Name: BC-4 Type: Displacement/Rotation
*Boundary
Part-1-1.FixedZ-Node, 3, 3

** ----------------------------------------------------------------
** STEP: Step-1
**
*Step, name=Step-1, nlgeom=YES, inc=10000, unsymm=YES, amplitude=RAMP
*Coupled Temperature-displacement, creep=none, deltmx=1e13
0.00001, 1., 1e-25, 0.001
**Controls, parameters=TIME INCREMENTATION
**2,10,1E-10,0.01
**
** BOUNDARY CONDITIONS
**
** Name: BC-5 Type: Displacement/Rotation
*Boundary, amplitude=Amp-1
Part-1-1.DISPX, 1, 1, 1.
** Name: SurfaceH Type: Temperature
*Boundary, amplitude=Amp-1
Hsurface, 11, 11, 2.659e13

**
** OUTPUT REQUESTS
**
*Restart, write, frequency=0
**
** FIELD OUTPUT: F-Output-1
**
*Output, field, frequency=2
*Node Output
CF, RF, U
**
** FIELD OUTPUT: F-Output-2
**
*Element Output, directions=YES
S, SDV
*Output, history, frequency=0
*End Step

**nodes
** 828, 826, 896 895, 889, 281, 276, 829, 867, 908
** 899, 284, 822, 1034, 998, 972, 968, 967, 969, 356
** 360, 974, 976, 91, 368, 369, 370, 419, 958, 993
** 995, 1005, 1013, 1014, 1015, 975, 357, 362, 366, 367
** 929, 939, 940, 942, 945, 954, 960, 965, 966
