*Heading
 OneFifthMesh-periodic
** Job name: test Model name: Model-1
** Generated by: Abaqus/CAE 2024
*Preprint, echo=NO, model=NO, history=NO, contact=NO
**
** PARTS
**
*Part, name=Part-1
*Node
      1,           1.,           1., 0.00999999978
      2,           1.,           0., 0.00999999978
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*Element, type=C3D10T
   1,   27,    2,  882,  161,  885,  884,  883,  887,  886,  888
   2,  199,  879,   25,   30,  891,  890,  889,  893,  892,  894
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*Nset, nset=Set-1, generate
    1,  5043,     1
*Elset, elset=Set-1, generate
    1,  2400,     1
*Nset, nset=MAT1_GRN1, generate
    1,  5043,     1
*Elset, elset=MAT1_GRN1, generate
    1,  2400,     1
** Section: Section-1
*Solid Section, elset=MAT1_GRN1, material=MAT1_GRN1
,
*End Part
**
** ASSEMBLY
**
*Assembly, name=Assembly
**
*Instance, name=Part-1-1, part=Part-1
*End Instance
**
*Nset, nset=Set-102, instance=Part-1-1, generate
    1,  5043,     1
*Elset, elset=Set-102, instance=Part-1-1, generate
    1,  2400,     1
*Nset, nset=Set-1, instance=Part-1-1
    5,    6,    7,    8,   85,   86
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*Elset, elset=Set-1, instance=Part-1-1
  445, 1226, 1227, 1235, 1241, 1242
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*Nset, nset=Set-2, instance=Part-1-1
    1,    2,    3,    4,    9,   10
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*Elset, elset=Set-2, instance=Part-1-1
 1531, 1565, 1568, 1642, 1661, 1695
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*End Assembly
**
*Amplitude, name=Amp-1
             0.,              0.,              1.,            0.05
**
** MATERIALS
**
*Material, name=MAT1_GRN1
*Density
1.,
*Depvar
     76,
*User Material, constants=8, type=MECHANICAL
768.,1., 595., 0.059, 217.72, 121.79, 93.733, 0.3
*User Material, constants=8, type=THERMAL
0.01271, 4, 20.2e6, 0., 58.6e6, 8.464e13, 11.5e6, 8.464e17
***********************************************
** PREDEFINED FIELDS
**
** Name: Predefined Field-1   Type: Temperature
*Initial Conditions, type=TEMPERATURE
Set-102, 2.659e11
**
** ----------------------------------------------------------------
** STEP: Step-1
**
*Step, name=Step-1, nlgeom=YES, inc=1000000, unsymm=YES, amplitude=RAMP
*Coupled Temperature-displacement, creep=none, deltmx=1e13
0.0001, 1., 1e-25, 0.01
**Controls, parameters=TIME INCREMENTATION
**2,10,1E-10,0.01
**
**
** BOUNDARY CONDITIONS
**
** Name: BC-1 Type: Symmetry/Antisymmetry/Encastre
*Boundary
Set-1, ENCASTRE
** Name: BC-2 Type: Displacement/Rotation
*Boundary
Set-2, 1, 1, 0.1
** Name: Set-1 Type: Temperature
*Boundary, amplitude=Amp-1
Set-1, 11, 11, 2.659e13
**
**
**
** OUTPUT REQUESTS
**
*Restart, write, frequency=0
**
** FIELD OUTPUT: F-Output-1
**
*Output, field, frequency=2
*Node Output
NT, RF, RFL, U
**
** FIELD OUTPUT: F-Output-2
**
*Element Output, directions=YES
E, HFL, LE, S, SDV, TEMP, S
*Output, history, frequency=0
*End Step
