*Heading
 OneFifthMesh-periodic
** Job name: OneFifthMesh-Periodic Model name: tension-5-periodic
** Generated by: Abaqus/CAE 2019
*Preprint, echo=NO, model=NO, history=NO, contact=NO
**
** PARTS
**
*Part, name=Part-1
*Node
      1,          -1.,          -1.,  0.100000001
      2,          -1.,           1.,  0.100000001
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*Element, type=C3D10
  1,  240,  239,  108,  243,  263,  262,  261,  265,  264,  266
  2,  243,  108,  100,  109,  266,  268,  267,  270,  269,  271
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*Nset, nset=Set-1, generate
     1,  1480,      1
*Elset, elset=Set-1, generate
    1,  721,     1
*Nset, nset=Set-2
    1,    2,    3,    4,    9,   10
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*Elset, elset=Set-2
 253, 390, 441, 482, 498, 503
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*Elset, elset=_Surf-1_S2
  22, 347, 359, 443, 473, 485, 613
*Elset, elset=_Surf-1_S3
  70, 506, 560, 612, 639
*Elset, elset=_Surf-1_S1
 307, 309, 357
*Elset, elset=_Surf-1_S4
 332, 475, 526, 596, 644
*Surface, type=ELEMENT, name=Surf-1
_Surf-1_S2, S2
_Surf-1_S3, S3
_Surf-1_S4, S4
_Surf-1_S1, S1
**
**
** Section: Section-1
*Solid Section, elset=Set-1, material=MAT1_GRN1
,
*End Part
**
**
** ASSEMBLY
**
*Assembly, name=Assembly
**
*Instance, name=Part-1-1, part=Part-1
*End Instance
**
*Nset, nset=Set-102, instance=Part-1-1, generate
    1,  1480, 1
*Elset, elset=Set-102, instance=Part-1-1, generate
    1,  721, 1
*Nset, nset=Hsurface, instance=Part-1-1
    1,    2,    3,    4,    9,   10
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** MATERIALS
**
*Material, name=Material-1
*Density
1.,
*Elastic
 2.65e+06, 0.3
** ----------------------------------------------------------------
**
** STEP: Step-1
**
*Step, name=Step-1, nlgeom=NO
*Static
1., 1., 1e-05, 1.
**
** BOUNDARY CONDITIONS
**
** Name: BC-1 Type: Symmetry/Antisymmetry/Encastre
*Boundary
Set-1, ENCASTRE
**
** LOADS
**
** Name: Load-1   Type: Pressure
*Dsload
Surf-1, P, -0.1
**
** OUTPUT REQUESTS
**
*Restart, write, frequency=0
**
** FIELD OUTPUT: F-Output-1
**
*Output, field, variable=PRESELECT
**
** HISTORY OUTPUT: H-Output-1
**
*Output, history, variable=PRESELECT
*End Step
