*Heading
** Job name: new_c3d10 Model name: 4_grn_C3D10T
** Generated by: Abaqus/CAE 2024
*Preprint, echo=NO, model=NO, history=NO, contact=NO
**
** PARTS
**
*Part, name=PART-1
*Node
      1,   2.79999995,           0.,   1.60000002
      2,   2.79999995,  0.400000006,   1.60000002
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*Element, type=C3D10T
   1,  368,  369,  370,  371,  499,  498,  497,  501,  500,  502
   2,    2,   77,  372,   78,  505,  504,  503,  507,  506,  508
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*Elset, elset=MICRO-1_GRAIN_1, generate
  981,  1168,     1
*Elset, elset=MICRO-1_GRAIN_2, generate
 1241,  1638,     1
*Elset, elset=MICRO-1_GRAIN_3, generate
   1,  980,    1
*Elset, elset=MICRO-1_GRAIN_4, generate
 1169,  1240,     1
** Section: Section-1-MICRO-1_GRAIN_3
*Solid Section, elset=MICRO-1_GRAIN_3, material=MAT1_GRN1
,
** Section: Section-2-MICRO-1_GRAIN_1
*Solid Section, elset=MICRO-1_GRAIN_1, material=MAT2_GRN12
,
** Section: Section-3-MICRO-1_GRAIN_4
*Solid Section, elset=MICRO-1_GRAIN_4, material=MAT2_GRN25
,
** Section: Section-4-MICRO-1_GRAIN_2
*Solid Section, elset=MICRO-1_GRAIN_2, material=MAT3_GRN7
,
*End Part
**
**
** ASSEMBLY
**
*Assembly, name=Assembly
**
*Instance, name=PART-1-1, part=PART-1
*End Instance
**
*Nset, nset=Set-102, instance=PART-1-1, generate
  1,  2710, 1
*Elset, elset=Set-102, instance=PART-1-1, generate
  1,  1638,   1
*Nset, nset=FIXED_X, instance=PART-1-1
   33,   44,   50,   63,   68,   75
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*Nset, nset=FIXED_Y, instance=PART-1-1
    1,    3,    5,    6,    9,   10
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*Nset, nset=FIXED_Z, instance=PART-1-1
   32,   35,   36,   39,   40,   43
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*Nset, nset=LOAD_X, instance=PART-1-1
   21,   22,   25,   42,   49,   61
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*Nset, nset=temp, instance=PART-1-1
   26,   27,   28,   29,   30,  193
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*End Assembly
*Amplitude, name=AMP-1
             0.,              0.,              1.,            0.05
**
** MATERIALS
**
*Material, name=MAT1_GRN1
*Density
1.,
*Depvar
     76,
*User Material, constants=8, type=MECHANICAL
768.,1., 595., 0.059, 217.72, 121.79, 93.733, 0.3
*User Material, constants=8, type=THERMAL
0.01271, 4, 20.2e6, 0., 58.6e6, 8.464e13, 11.5e6, 8.464e17
**
*Material, name=MAT2_GRN12
*Density
1.,
*Depvar
     76,
*User Material, constants=8, type=MECHANICAL
768.,1., 595., 0.059, 217.72, 121.79, 93.733, 0.3
*User Material, constants=8, type=THERMAL
0.01271, 4, 20.2e6, 0., 58.6e6, 8.464e13, 11.5e6, 8.464e17
**
*Material, name=MAT2_GRN25
*Density
1.,
*Depvar
     76,
*User Material, constants=8, type=MECHANICAL
768.,1., 595., 0.059, 217.72, 121.79, 93.733, 0.3
*User Material, constants=8, type=THERMAL
0.01271, 4, 20.2e6, 0., 58.6e6, 8.464e13, 11.5e6, 8.464e17
**
*Material, name=MAT3_GRN7
*Density
1.,
*Depvar
     76,
*User Material, constants=8, type=MECHANICAL
768.,1., 595., 0.059, 217.72, 121.79, 93.733, 0.3
*User Material, constants=8, type=THERMAL
0.01271, 4, 20.2e6, 0., 58.6e6, 8.464e13, 11.5e6, 8.464e17
**
***********************************************
** PREDEFINED FIELDS
**
** Name: Predefined Field-1   Type: Temperature
*Initial Conditions, type=TEMPERATURE
Set-102, 2.659e11
**
** BOUNDARY CONDITIONS
**
** Name: Disp-BC-1 Type: Displacement/Rotation
*Boundary
FIXED_X, 1, 1
** Name: Disp-BC-2 Type: Displacement/Rotation
*Boundary
FIXED_Y, 2, 2
** Name: Disp-BC-3 Type: Displacement/Rotation
*Boundary
FIXED_Z, 3, 3
**
**
** ----------------------------------------------------------------
**
** ----------------------------------------------------------------
*Step, name=Step-1, nlgeom=YES, inc=1000000, unsymm=YES, amplitude=RAMP
*Coupled Temperature-displacement, creep=none, deltmx=1e13
0.0001, 1., 1e-25, 0.01
**
** BOUNDARY CONDITIONS Loading
**
** Name: Disp-BC-4 Type: Displacement/Rotation
*Boundary
LOAD_X, 1, 1, 0.05
** Name: temp Type: Temperature
*Boundary
temp, 11, 11, 2.659e13
**
** OUTPUT REQUESTS
**
*Restart, write, frequency=0
**
** FIELD OUTPUT: F-Output-1
**
*Output, field, frequency=1
*Node Output
NT, RF, RFL, U
**
** FIELD OUTPUT: F-Output-2
**
*Element Output, directions=YES
E, HFL, LE, S, SDV, TEMP, S
*Output, history, frequency=0
*End Step
