*Heading
** Job name: deformPolyCrys Model name: deformPolyCrys
** Generated by: Abaqus/CAE 2024
*Preprint, echo=NO, model=NO, history=NO, contact=NO
** ----------------------------------------------------------------
**
** PART INSTANCE: MICRO-1
**
*Node
      1,   2.79999995,           0.,   1.60000002
      2,   2.79999995,  0.400000006,   1.60000002
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*Element, type=C3D10
   1,  368,  369,  370,  371,  499,  498,  497,  501,  500,  502
   2,    2,   77,  372,   78,  505,  504,  503,  507,  506,  508
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*Elset, elset=MICRO-1_GRAIN_3, generate
   1,  980,    1
*Elset, elset=MICRO-1_GRAIN_1, generate
  981,  1168,     1
*Elset, elset=MICRO-1_GRAIN_4, generate
 1169,  1240,     1
*Elset, elset=MICRO-1_GRAIN_2, generate
 1241,  1638,     1
** Section: Section-1-GRAIN_3
*Solid Section, elset=MICRO-1_GRAIN_3, material=MAT1_GRN1
,
** Section: Section-2-GRAIN_1
*Solid Section, elset=MICRO-1_GRAIN_1, material=MAT2_GRN12
,
** Section: Section-3-GRAIN_4
*Solid Section, elset=MICRO-1_GRAIN_4, material=MAT2_GRN25
,
** Section: Section-4-GRAIN_2
*Solid Section, elset=MICRO-1_GRAIN_2, material=MAT3_GRN7
,
*System
*Nset, nset=FIXED_X
   33,   44,   50,   63,   68,   75
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*Nset, nset=FIXED_Y
    1,    3,    5,    6,    9,   10
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*Nset, nset=FIXED_Z
   32,   35,   36,   39,   40,   43
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*Nset, nset=LOAD_X
   21,   22,   25,   42,   49,   61
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**
** MATERIALS
**
*Material, name=MAT1_GRN1
*Depvar
     70,
*User Material, constants=2
768.,1.
*Material, name=MAT2_GRN12
*Depvar
     70,
*User Material, constants=2
768.,1.
*Material, name=MAT2_GRN25
*Depvar
     70,
*User Material, constants=2
768.,1.
*Material, name=MAT3_GRN7
*Depvar
     70,
*User Material, constants=2
768.,1.
**
*Amplitude, name=Amp-1
             0.,              0.,              1.,            0.05
**
** BOUNDARY CONDITIONS
**
** Name: Disp-BC-1 Type: Displacement/Rotation
*Boundary
FIXED_X, 1, 1
** Name: Disp-BC-2 Type: Displacement/Rotation
*Boundary
FIXED_Y, 2, 2
** Name: Disp-BC-3 Type: Displacement/Rotation
*Boundary
FIXED_Z, 3, 3
** ----------------------------------------------------------------
**
** STEP: deform_x
**
*Step, name=deform_x, nlgeom=YES, inc=10000, amplitude=RAMP
*Static
0.0001, 1., 1e-25, 0.01
**
** BOUNDARY CONDITIONS
**
** Name: Disp-BC-4 Type: Displacement/Rotation
*Boundary
LOAD_X, 1, 1, 0.5
**
** OUTPUT REQUESTS
**
*Restart, write, frequency=0
**
** FIELD OUTPUT: F-Output-1
**
*Output, field, frequency=2
*Node Output
CF, RF, U
**
** FIELD OUTPUT: F-Output-2
**
*Element Output, directions=YES
S, SDV
*Output, history, frequency=0
*End Step
